// COMSOL Multiphysics 6.2.0.290 model "pool_concrete_boundary.mph"
// Outline of the model tree

Parameters
  scaling_sigma = 1/200
  scaling_k = 1.0
  scaling_c1 = 0.26*10
  scaling_A = 140e-3*1.0
  scaling_c2 = 0.1*10
  scaling_e = 1.1
  V2S_SAN = 1
  V2S_torso = 1
  V2S_Atria = 1
  V2S_AVN = 1
  V2S_His = 1
  V2S_Bundle = 1
  V2S_Septum = 1
  V2S_Purkinje = 1
  V2S_Ventricles = 1
  heart_x = lane_w
  heart_y = 2500
  heart_z = pool_z - 200
  pool_x = 500 * 10
  pool_y = 500 * 10
  pool_z = 150 * 10
  body_z = 50 * 10
  body_r = 10 * 10
  rope_r = 0.4/2 * 10
  rope_uw = 5 * 10
  lane_w = 250 * 10
  lane_side = 300 * 10
  wall_thick = 50 * 10
  bar_r = 1.59/2 * 10
  bar_int = 50 * 10
  bar_side = wall_thick / 2
  corneum_thick = 10

Variables
  var1 "Variables.SAN" on selection sel34
    a = -0.60
    b = -0.30
    c1 = 1000
    c2 = 1.0
    d = 0.0
    e = 0.066
    A = 33e-3
    B = -22e-3
    k = 1000*1
    sigma_e = 0.05*scaling_sigma*V2S_SAN
    sigma_i = 0.05*scaling_sigma*V2S_SAN
    iion1 = k*c1*(Vm1-B)*(a-(Vm1-B)/A)*(1-(Vm1-B)/A)+k*c2*u1
    Vi0 = -0.06
    Ve0 = 0
    u0 = 0
    Vm1 = Vi1-Ve1
  var2 "Variables.Atria" on selection sel35
    a = 0.13
    b = 0
    c1 = scaling_c1
    c2 = scaling_c2
    d = 1
    e = 0.012*scaling_e
    A = scaling_A
    B = -85e-3
    k = 1000*scaling_k
    sigma_e = 0.8*scaling_sigma*V2S_Atria
    sigma_i = 0.8*scaling_sigma*V2S_Atria
    iion1 = k*c1*(Vm1-B)*(a-(Vm1-B)/A)*(1-(Vm1-B)/A)+k*c2*u1*(Vm1-B)
    Vi0 = -0.085
    Ve0 = 0
    u0 = 0
    Vm1 = Vi1-Ve1
  var3 "Variables.AVN" on selection sel36
    a = 0.13
    b = 0
    c1 = scaling_c1
    c2 = scaling_c2
    d = 1
    e = 0.012*scaling_e
    A = scaling_A
    B = -85e-3
    k = 1000*scaling_k
    sigma_e = 0.05*scaling_sigma*V2S_AVN
    sigma_i = 0.05*scaling_sigma*V2S_AVN
    iion1 = k*c1*(Vm1-B)*(a-(Vm1-B)/A)*(1-(Vm1-B)/A)+k*c2*u1*(Vm1-B)
    Vi0 = -0.085
    Ve0 = 0
    u0 = 0
    Vm1 = Vi1-Ve1
  var9 "Variables.Ventricles.His" on selection sel37
    a = 0.13
    b = 0
    c1 = scaling_c1
    c2 = scaling_c2
    d = 1
    e = 0.0045*scaling_e
    A = scaling_A
    B = -85e-3
    k = 1000*scaling_k
    sigma_e = 1*scaling_sigma*V2S_His
    sigma_i = 1*scaling_sigma*V2S_His
    iion1 = k*c1*(Vm1-B)*(a-(Vm1-B)/A)*(1-(Vm1-B)/A)+k*c2*u1*(Vm1-B)
    Vi0 = -0.085
    Ve0 = 0
    u0 = 0
    Vm1 = Vi1-Ve1
  var14 "Variables.Ventricles.Bundle" on selection sel40
    a = 0.13
    b = 0
    c1 = scaling_c1
    c2 = scaling_c2
    d = 1
    e = 0.0020*scaling_e
    A = scaling_A
    B = -85e-3
    k = 1000*scaling_k
    sigma_e = 1.5*scaling_sigma*V2S_Bundle
    sigma_i = 1.5*scaling_sigma*V2S_Bundle
    iion1 = k*c1*(Vm1-B)*(a-(Vm1-B)/A)*(1-(Vm1-B)/A)+k*c2*u1*(Vm1-B)
    Vi0 = -0.085
    Ve0 = 0
    u0 = 0
    Vm1 = Vi1-Ve1
  var10 "Variables.Ventricles.Septum" on selection sel42
    a = 0.13
    b = 0
    c1 = scaling_c1
    c2 = scaling_c2
    d = 1
    e = 0.0055*scaling_e
    A = scaling_A
    B = -85e-3
    k = 1000*scaling_k
    sigma_e = 0.8*scaling_sigma*V2S_Septum
    sigma_i = 0.8*scaling_sigma*V2S_Septum
    iion1 = k*c1*(Vm1-B)*(a-(Vm1-B)/A)*(1-(Vm1-B)/A)+k*c2*u1*(Vm1-B)
    Vi0 = -0.085
    Ve0 = 0
    u0 = 0
    Vm1 = Vi1-Ve1
  var13 "Variables.Ventricles.Purkinje" on domains 8, 9
    a = 0.13
    b = 0
    c1 = scaling_c1
    c2 = scaling_c2
    d = 1
    e = 0.0043*scaling_e
    A = scaling_A * 1.0
    B = -85e-3
    k = 1000*scaling_k
    sigma_e = 3.5*scaling_sigma*V2S_Purkinje
    sigma_i = 3.5*scaling_sigma*V2S_Purkinje
    iion1 = k*c1*(Vm1-B)*(a-(Vm1-B)/A)*(1-(Vm1-B)/A)+k*c2*u1*(Vm1-B)
    Vi0 = -0.085
    Ve0 = 0
    u0 = 0
    Vm1 = Vi1-Ve1
  var4 "Variables.Ventricles.Ventricles" on domains 6, 7
    a = 0.13
    b = 0
    c1 = scaling_c1
    c2 = scaling_c2
    d = 1
    e = 0.0055*scaling_e
    A = scaling_A
    B = -85e-3
    k = 1000*scaling_k
    sigma_e = 0.8*scaling_sigma*V2S_Ventricles
    sigma_i = 0.8*scaling_sigma*V2S_Ventricles
    iion1 = k*c1*(Vm1-B)*(a-(Vm1-B)/A)*(1-(Vm1-B)/A)+k*c2*u1*(Vm1-B)
    Vi0 = -0.085
    Ve0 = 0
    u0 = 0
    Vm1 = Vi1-Ve1
  var5 "Variables.Torso" on domains 4, 5, 10, 14, 16-18, 23, 24
    VI = VL(V)-VR(V)
    VII = VF(V)-VR(V)
    VIII = VF(V)-VL(V)
    aVR = (2*VR(V)-VL(V)-VF(V))/2
    aVL = (2*VL(V)-VF(V)-VR(V))/2
    aVF = (2*VF(V)-VL(V)-VR(V))/2
    V1 = Chest1(V) - (VF(V) + VL(V) + VR(V)) / 3
    V2 = Chest2(V) - (VF(V) + VL(V) + VR(V)) / 3
    V3 = Chest3(V) - (VF(V) + VL(V) + VR(V)) / 3
    V4 = Chest4(V) - (VF(V) + VL(V) + VR(V)) / 3
    V5 = Chest5(V) - (VF(V) + VL(V) + VR(V)) / 3
    V6 = Chest6(V) - (VF(V) + VL(V) + VR(V)) / 3
  var16 "Variables.Water" on domains 3
    VP11 = L11(V) - R11(V)
    VP12 = L12(V) - R12(V)
    Vp13 = L13(V) - R13(V)
    VP21 = L21(V) - R21(V)
    VP22 = L22(V) - R22(V)
    VP23 = L23(V) - R23(V)
    VP31 = L31(V) - R31(V)
    VP32 = L32(V) - R32(V)
    VP33 = L33(V) - R33(V)
  var6 "dielectric.properties.Heart" on selection sel1
    sigma_b = 0.053677*V2S_torso
    epsilon_b = 23562000*V2S_torso
  var7 "dielectric.properties.Blood" on selection sel3
    sigma_b = 0.7*V2S_torso
    epsilon_b = 5260*V2S_torso
  var8 "dielectric.properties.Torso" on domains 4
    sigma_b = 0.20197*V2S_torso
    epsilon_b = 25700000*V2S_torso
  var11 "dielectric.properties.Lungs" on domains 5
    sigma_b = 0.038904*V2S_torso
    epsilon_b = 32248000*V2S_torso
  var12 "dielectric.properties.Insulator" on selection sel4
    sigma_b = 1e-9
    epsilon_b = 1e9

Selections
  sel34: Explicit "Domain Heart.SAN" on domains 25
  sel35: Explicit "Domain Heart.Atria" on domains 15, 21
  sel36: Explicit "Domain Heart.AVN" on domains 20, 22
  sel37: Explicit "Domain Heart.HIS" on domains 19
  sel40: Explicit "Domain Heart.BNL" on domains 11
  sel38: Explicit "Domain Heart.PKJ" on domains 8, 9
  sel42: Explicit "Domain Heart.Septum" on domains 12, 13
  sel39: Explicit "Domain Heart.Ventricles" on domains 6, 7
  sel1: Explicit "Heart Domain" on domains 6-9, 11-13, 15, 19-22, 25
  sel2: Explicit "Torso Domain" on domains 4, 5, 10, 14, 16-18, 23, 24
  sel3: Explicit "Blood Selection" on domains 10, 16-18, 23, 24
  sel4: Explicit "Isolation Selection" on domains 14
  sel43: Explicit "Boundaries Reinforced bars" on boundaries adjacent to domains 2
  sel5: Explicit "Boundaries Heart" on boundaries adjacent to domains 6-9, 11-13, 15, 19-22, 25
  sel6: Explicit "Boundaries Torso" on boundaries adjacent to domains 4, 5, 10, 14, 16-18, 23, 24
  int1: Intersection "Intersection Heart-Torso" | entitydim = 2; input = {sel5, sel6}
  sel7: Explicit "Selection VR" on points 996
  sel8: Explicit "Selection VL" on points 881
  sel9: Explicit "Selection VF" on points 880
  sel10: Explicit "Selection VGND" on points 995
  sel11: Explicit "Selection V1" on points 979
  sel12: Explicit "Selection V2" on points 923
  sel13: Explicit "Selection V3" on points 889
  sel14: Explicit "Selection V4" on points 886
  sel15: Explicit "Selection V5" on points 885
  sel16: Explicit "Selection V6" on points 882

Couplings
  intop1: Integration "Integration VR" on points 996 | opname = VR
  intop2: Integration "Integration VL" on points 881 | opname = VL
  intop3: Integration "Integration VF" on points 880 | opname = VF
  intop4: Integration "Integration GND" on selection sel10 | opname = GND
  intop5: Integration "Integration P1" on selection sel11 | opname = Chest1
  intop6: Integration "Integration P2" on selection sel12 | opname = Chest2
  intop7: Integration "Integration P3" on selection sel13 | opname = Chest3
  intop8: Integration "Integration P4" on selection sel14 | opname = Chest4
  intop9: Integration "Integration P5" on selection sel15 | opname = Chest5
  intop10: Integration "Integration P6" on selection sel16 | opname = Chest6
  intop11: Integration "Integration L11" on points 824 | opname = L11
  intop12: Integration "Integration L12" on points 713 | opname = L12
  intop13: Integration "Integration L13" on points 602 | opname = L13
  intop16: Integration "Integration L21" (disabled) on no points | opname = L21
  intop17: Integration "Integration L22" (disabled) on no points | opname = L22
  intop18: Integration "Integration L23" (disabled) on no points | opname = L23
  intop21: Integration "Integration L31" (disabled) on no points | opname = L31
  intop22: Integration "Integration L32" (disabled) on no points | opname = L32
  intop23: Integration "Integration L33" (disabled) on no points | opname = L33
  intop26: Integration "Integration R11" on points 1052 | opname = R11
  intop27: Integration "Integration R12" on points 1163 | opname = R12
  intop28: Integration "Integration R13" on points 1274 | opname = R13
  intop31: Integration "Integration R21" (disabled) on no points | opname = R21
  intop32: Integration "Integration R22" (disabled) on no points | opname = R22
  intop33: Integration "Integration R23" (disabled) on no points | opname = R23
  intop36: Integration "Integration R31" (disabled) on no points | opname = R31
  intop37: Integration "Integration R32" (disabled) on no points | opname = R32
  intop38: Integration "Integration R33" (disabled) on no points | opname = R33

Geometry
  geom1 "Geometry 1" (3D, length unit mm)
    sph1: Sphere "Atria Outer Sphere" | axistype = cartesian; r = 45
    sph2: Sphere "Atria Inner Sphere" | axistype = cartesian; r = 30
    cyl1: Cylinder "Atria Sep Cylinder"
      pos = {- 10 / 2, 0, 0}
      axis = {1, 0, 0}
      axistype = cartesian
      r = 30 + 5
      h = 10
    cyl5: Cylinder "AVN Cylinder" | pos = {-10 / 2, 3, 0}; axis = {1, 0, 0}; axistype = cartesian; r = 9; h = 10
    int2: Intersection "Atria Intersection" | input = cyl1, sph2; keep = on
    del25: Delete "Delete Sep Cylinder" | input = cyl1(1) domains 1; compat = 4.2a
    blk1: Block "Atria Diff Block 1" | pos = {0, -22, 0}; axistype = cartesian; base = center; size = {100, 50, 100}
    blk3: Block "Atria Diff Block 2" | pos = {0, -25, 0}; axistype = cartesian; base = center; size = {100, 50, 100}
    uni2: Union | input = blk1, blk3, cyl5, del25, int2, sph1, sph2
    spl1: Split "Atria Split" | input = uni2
    del24: Delete "Delete Redundant"
      input = spl1(1), spl1(10), spl1(17), spl1(2), spl1(3), spl1(5), spl1(8)
      compat = 4.2a
    uni7: Union "Atria Union" | input = spl1(15), spl1(6)
    elp1: Ellipsoid "Ventricle Outer Ellipsoid" | axistype = cartesian; semiaxes = {45, 69, 45}
    elp3: Ellipsoid "PKJ Outer Ellipsoid" | axistype = cartesian; semiaxes = {34, 50, 34}
    elp2: Ellipsoid "PKJ Inner Ellipsoid" | axistype = cartesian; semiaxes = {30, 46, 30}
    blk2: Block "Ventricle Block" | pos = {0, 50, 0}; axistype = cartesian; base = center; size = {100, 100, 100}
    dif1: Difference "PKJ Difference" | input = elp1, elp2, elp3; input2 = blk2
    spl5: Split "PKJ Split" | input = dif1
    cyl2: Cylinder "Spetum" | pos = {-5, -10, 0}; axis = {1, 0, 0}; axistype = cartesian; r = 40; h = 10
    int4: Intersection "Spetum Intersection" | input = cyl2, spl5(3); keep = on
    del26: Delete "Delete Redundant 2" | input = cyl2; compat = 4.2a
    blk6: Block "BNL Block" | pos = {0, -30, 0}; axistype = cartesian; base = center; size = {10, 54, 10}
    int6: Intersection "BNL Intersection" | input = blk6, spl5(3); keep = on
    int7: Intersection "BNL Intersection 2" | input = int6, spl1(11); keep = on
    dif4: Difference "BNL Difference" | input = int6; input2 = int7
    del29: Delete "Delete Redundant 3" | input = blk6; compat = 4.2a
    uni3: Union | input = dif4, int4, spl1(11), spl5(1), spl5(2), spl5(3)
    spl2: Split "Everything Split" | input = uni3
    uni6: Union "Spetum Union" | input = spl2(5), spl2(6)
    uni9: Union "Insulator Union" | input = spl1(12), spl1(14), spl1(4); intbnd = off; face = all
    uni8: Union "Blood Union" | input = spl1(18), spl1(19), spl1(7), spl1(9), spl2(3), spl2(8)
    uni10: Union "HIS Union" | input = spl2(7)
    sph3: Sphere "SAN Sphere" | pos = {-30+15, 30+12.5, 0}; axistype = cartesian; r = 3
    int5: Intersection "SAN Intersection 5" | input = sph3, uni7(1); keep = on
    del27: Delete "Delete Redundant 4" | input = sph3; compat = 4.2a
    blk10: Block | pos = {-75, -75, -75}; axistype = cartesian; size = {150, 30, 150}
    int11: Intersection | input = blk10, spl2(1); keep = on
    int12: Intersection | input = blk10, spl2(2); keep = on
    del33: Delete "Delete Entities 33" | input = blk10; compat = 4.2a
    rot5: Rotate
      input = int11(1), uni8(1), spl2(1), spl2(2), spl2(4), uni6(1), int12(1), uni10(1), int5(1), spl1(13), uni9(1), uni7(1), spl1(16)
      pos = {0, 0, 0}
      axistype = cartesian
      rot = 45
    wp1: WorkPlane "Lung Plane" | quickplane = xz; quicky = 100; quickz = 100; workplane3d = on
      e1: Ellipse | pos = {0, -30}; semiaxes = {150, 100}
      e2: Ellipse | pos = {10, 10}; semiaxes = {60, 70}
      dif1: Difference | input = e1; input2 = e2
    ext4: Extrude "Lung Extrude" | workplane = wp1; input = wp1; distance = 160
    wp2: WorkPlane "Corneum Plane" (disabled) | quickplane = xz; quicky = 150; quickz = 150; workplane3d = on
      e1: Ellipse | pos = {0, -30}; semiaxes = {200, 120}
    ext3: Extrude "Corneum Extrude" (disabled) | workplane = wp2; input = wp2; distance = 300
    wp3: WorkPlane "Torso Plane" | quickplane = xz; quicky = 150; quickz = 150; workplane3d = on
      e1: Ellipse | pos = {0, -30}; semiaxes = {200, 120}
    ext5: Extrude "Torso Extrude" | workplane = wp3; input = wp3; distance = 300
    pt11: Point "Point V1" | p = {-25, , }
    pt12: Point "Point V2" | p = {25, 0, 85}
    pt13: Point "Point V3" | p = {65, -25, 75}
    pt14: Point "Point V4" | p = {90, -50, 70}
    pt15: Point "Point V5" | p = {140, -50, 50}
    pt16: Point "Point V6" | p = {190, -50, 0}
    rot6: Rotate
      input = ext3, ext4, ext5, pt11, pt12, pt13, pt14, pt15, pt16, rot5
      pos = {0, 0, 0}
      axistype = y
      rot = 180
    rot7: Rotate | input = rot6; pos = {0, 0, 0}; axistype = x; rot = 90
    mov1: Move | input = rot7; displx = heart_x; disply = heart_y+30; displz = heart_z
    blk16: Block "water" | size = {pool_x, pool_y, pool_z}
    pt17: Point "Point L1" | p = {heart_x-250, heart_y, heart_z}
    arr9: Array | input = pt17; displ = {-500, -500, 0}
    pt18: Point "Point R1" | p = {heart_x+250, heart_y, heart_z}
    arr10: Array | input = pt18; displ = {500, -500, 0}
    cyl11: Cylinder "rope1" (disabled)
      pos = {lane_w / 2, 0, pool_z - rope_r - rope_uw}
      axistype = y
      r = rope_r
      h = pool_y
    cyl12: Cylinder "rope2" (disabled)
      pos = {lane_w * 3 / 2, 0, pool_z - rope_r - rope_uw}
      axistype = y
      r = rope_r
      h = pool_y
    cyl13: Cylinder "rope3" (disabled)
      pos = {lane_side + lane_w * 2, 0, pool_z - rope_r - rope_uw}
      axistype = y
      r = rope_r
      h = pool_y
    cyl14: Cylinder "rope4" (disabled)
      pos = {lane_side + lane_w * 3, 0, pool_z - rope_r - rope_uw}
      axistype = y
      r = rope_r
      h = pool_y
    cyl15: Cylinder "rope5" (disabled)
      pos = {lane_side + lane_w * 4, 0, pool_z - rope_r - rope_uw}
      axistype = y
      r = rope_r
      h = pool_y
    cyl16: Cylinder "rope6" (disabled)
      pos = {lane_side + lane_w * 5, 0, pool_z - rope_r - rope_uw}
      axistype = y
      r = rope_r
      h = pool_y
    cyl17: Cylinder "rope7" (disabled)
      pos = {lane_side + lane_w * 6, 0, pool_z - rope_r - rope_uw}
      axistype = y
      r = rope_r
      h = pool_y
    blk19: Block "concrete outer"
      pos = {pool_x / 2, pool_y / 2, pool_z / 2 - wall_thick / 2}
      base = center
      size = {pool_x + 2 * wall_thick, pool_y + 2 * wall_thick, pool_z + wall_thick}
    blk20: Block "concrete inner"
      pos = {pool_x / 2, pool_y / 2, pool_z / 2}
      base = center
      size = {pool_x, pool_y, pool_z}
    dif8: Difference "concrete walls" | input = blk19; input2 = blk20; intbnd = off; face = all
    cyl18: Cylinder "bar -x"
      pos = {- wall_thick + bar_side, - bar_side, - bar_side}
      axistype = x
      r = bar_r
      h = pool_x + 2 * wall_thick - 2 * bar_side
    arr1: Array "bar array1 -x"
      input = cyl18
      size = {1, ceil((pool_y + wall_thick) / bar_int) + 1, 1}
      fullsize = {1, ceil((pool_y + wall_thick) / bar_int) + 1, 1}
      displ = {bar_int, bar_int, bar_int}
    arr2: Array "bar array2 -x"
      input = arr1(1,1,1), arr1(1,12,1)
      size = {1, 1, ceil((wall_thick + pool_z) / bar_int)}
      fullsize = {1, 1, ceil((wall_thick + pool_z) / bar_int)}
      displ = {bar_int, bar_int, bar_int}
    cyl19: Cylinder "bar -y"
      pos = {- bar_side, - wall_thick + bar_side, - bar_side}
      axistype = y
      r = bar_r
      h = pool_y + 2 * wall_thick - 2 * bar_side
    arr3: Array "bar array1 -y"
      input = cyl19
      size = {ceil((pool_x + wall_thick) / bar_int) + 1, 1, 1}
      fullsize = {ceil((pool_x + wall_thick) / bar_int) + 1, 1, 1}
      displ = {bar_int, bar_int, bar_int}
    arr4: Array "bar array2 -y"
      input = arr3(1,1,1), arr3(12,1,1)
      size = {1, 1, ceil((wall_thick + pool_z) / bar_int)}
      fullsize = {1, 1, ceil((wall_thick + pool_z) / bar_int)}
      displ = {bar_int, bar_int, bar_int}
    cyl20: Cylinder "bar -z"
      pos = {- bar_side, - bar_side, - wall_thick + bar_side}
      ax2 = {0.0, 0.0}
      r = bar_r
      h = pool_z + wall_thick - 2 * bar_side
    arr5: Array "bar array1 -z"
      input = cyl20
      size = {ceil((pool_x + wall_thick) / bar_int) + 1, 1, 1}
      fullsize = {ceil((pool_x + wall_thick) / bar_int) + 1, 1, 1}
      displ = {bar_int, bar_int, bar_int}
    arr6: Array "bar array2 -z"
      input = arr5(1,1,1)
      size = {1, ceil((pool_y + wall_thick) / bar_int) + 1, 1}
      fullsize = {1, ceil((pool_y + wall_thick) / bar_int) + 1, 1}
      displ = {bar_int, bar_int, bar_int}
    arr7: Array "bar array3 -z"
      input = arr5(12,1,1)
      size = {1, ceil((pool_y + wall_thick) / bar_int) + 1, 1}
      fullsize = {1, ceil((pool_y + wall_thick) / bar_int) + 1, 1}
      displ = {bar_int, bar_int, bar_int}
    arr8: Array "bar array4 -z"
      input = arr6(1,12,1)
      size = {ceil((pool_x + wall_thick) / bar_int), 1, 1}
      fullsize = {ceil((pool_x + wall_thick) / bar_int), 1, 1}
      displ = {bar_int, bar_int, bar_int}
    uni18: Union "reinforced bar union"
      input = arr1(1,10,1), arr1(1,11,1), arr1(1,2,1), arr1(1,3,1), arr1(1,4,1), arr1(1,5,1), arr1(1,6,1), arr1(1,7,1), arr1(1,8,1), arr1(1,9,1), arr7, arr8, arr3(10,1,1), arr3(11,1,1), arr3(2,1,1), arr3(3,1,1), arr3(4,1,1), arr3(5,1,1), arr3(6,1,1), arr3(7,1,1), arr3(8,1,1), arr3(9,1,1), arr5(10,1,1), arr5(11,1,1), arr5(2,1,1), arr5(3,1,1), arr5(4,1,1), arr5(5,1,1), arr5(6,1,1), arr5(7,1,1), arr5(8,1,1), arr5(9,1,1), arr2, arr4, arr6(1,1,1), arr6(1,10,1), arr6(1,11,1), arr6(1,2,1), arr6(1,3,1), arr6(1,4,1)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
      intbnd = off
      face = all
    fin: Finalize "Form Union"

Materials
  mat1: Common "Water, liquid" on domains 3
    def "Basic"
      electricconductivity = 0.05
      thermalexpansioncoefficient = alpha_p(T)
      bulkviscosity = muB(T)
      dynamicviscosity = eta(T)
      ratioofspecificheat = gamma_w(T)
      heatcapacity = Cp(T)
      density = rho(T)
      thermalconductivity = k(T)
      soundspeed = cs(T)
      relpermittivity = 78
      eta: Piecewise
        arg = T
        pieces = 
          {273.15, 413.15, 1.3799566804-0.021224019151*T^1+1.3604562827E-4*T^2-4.6454090319E-7*T^3+8.9042735735E-10*T^4-9.0790692686E-13*T^5+3.8457331488E-16*T^6}
          {413.15, 553.75, 0.00401235783-2.10746715E-5*T^1+3.85772275E-8*T^2-2.39730284E-11*T^3}
        argunit = K
        fununit = Pa*s
      Cp: Piecewise | arg = T; pieces = {273.15, 553.75, 12010.1471-80.4072879*T^1+0.309866854*T^2-5.38186884E-4*T^3+3.62536437E-7*T^4}; argunit = K; fununit = J/(kg*K)
      rho: Piecewise
        arg = T
        smooth = contd1
        pieces = 
          {273.15, 293.15, 6.3092789034e-05*T^3-0.0603676398829*T^2+18.9229382407066*T-950.704055329848}
          {293.15, 373.15, 1.0335053319e-05*T^3-0.0133950656345*T^2+4.96928883266*T+432.257114008512}
        argunit = K
        fununit = kg/m^3
      k: Piecewise | arg = T; pieces = {273.15, 553.75, -0.869083936+0.00894880345*T^1-1.58366345E-5*T^2+7.97543259E-9*T^3}; argunit = K; fununit = W/(m*K)
      cs: Interpolation | table = {{273, 1403}, {278, 1427}, {283, 1447}, {293, 1481}, {303, 1507}, {313, 1526}, {323, 1541}, {333, 1552}, {343, 1555}, {353, 1555}, {363, 1550}, {373, 1543}}; interp = piecewisecubic; fununit = m/s; argunit = K
      an1: Analytic | funcname = alpha_p; expr = -1/rho(T)*d(rho(T),T); args = T; fununit = 1/K; argunit = K
      an2: Analytic | funcname = gamma_w; expr = 1+(T/Cp(T))*(alpha_p(T)*cs(T))^2; args = T; fununit = 1; argunit = K
      an3: Analytic | funcname = muB; expr = 2.79*eta(T); args = T; fununit = Pa*s; argunit = K
  mat2: Common "Structural steel" on domains 2
    def "Basic"
      electricconductivity = 4.032e6[S/m]
      relpermittivity = 1
      lossfactor = 0.02
      relpermeability = 1
      heatcapacity = 475[J/(kg*K)]
      thermalconductivity = 44.5[W/(m*K)]
      thermalexpansioncoefficient = 12.3e-6[1/K]
      density = 7850[kg/m^3]
    Enu "Young's modulus and Poisson's ratio"
      E = E(T)
      nu = nu(T)
      int1: Interpolation | funcname = E; table = {{293.15, 200e9}, {793.15, 166.6e9}}; extrap = linear; fununit = Pa; argunit = K
      int2: Interpolation | funcname = nu; table = {{293.15, 0.30}, {793.15, 0.315}}; extrap = linear; fununit = 1; argunit = K
    Murnaghan
      l = -3.0e11[Pa]
      m = -6.2e11[Pa]
      n = -7.2e11[Pa]
    ElastoplasticModel "Elastoplastic material model"
      sigmags = 350[MPa]*a(T)
      Et = 1.045[GPa]*a(T)
      Ek = 1.045[GPa]*a(T)
      sigmagh = 1.050[GPa]*epe*a(T)
      Hillcoefficients = {0, 0, 0, 0, 0, 0}
      ys = {0, 0, 0, 0, 0, 0}
      int1: Interpolation | funcname = a; table = {{600, 1}, {1100, 0.1}, {1643, 0}}; fununit = 1; argunit = K
    Ludwik
      k_lud = 560[MPa]*a(T)
      n_lud = 0.61
      int1: Interpolation | funcname = a; table = {{600, 1}, {1100, 0.1}, {1643, 0}}; fununit = 1; argunit = K
    JohnsonCook
      k_jcook = 560[MPa]
      n_jcook = 0.61
      C_jcook = 0.12
      epet0_jcook = 1[1/s]
      m_jcook = 0.6
    Swift
      e0_swi = 0.021
      n_swi = 0.2
    Voce
      sigma_voc = 249[MPa]*a(T)
      beta_voc = 9.3
      int1: Interpolation | funcname = a; table = {{600, 1}, {1100, 0.1}, {1643, 0}}; fununit = 1; argunit = K
    HockettSherby
      sigma_hoc = 684[MPa]*a(T)
      m_hoc = 3.9
      n_hoc = 0.85
      int1: Interpolation | funcname = a; table = {{600, 1}, {1100, 0.1}, {1643, 0}}; fununit = 1; argunit = K
    ArmstrongFrederick
      Ck = 2.070[GPa]*a(T)
      gammak = 8.0
      int1: Interpolation | funcname = a; table = {{600, 1}, {1100, 0.1}, {1643, 0}}; fununit = 1; argunit = K
    Norton
      A_nor = 1.2e-15[1/s]
      sigRef_nor = 1[MPa]
      n_nor = 4.5
    Garofalo "Garofalo (hyperbolic sine)"
      A_gar = 1e-6[1/s]
      sigRef_gar = 100[MPa]
      n_gar = 4.6
    ChabocheViscoplasticity
      A_cha = 1
      sigRef_cha = 490[MPa]
      n_cha = 9
  mat3: Common "Concrete" on domains 1
    def "Basic"
      electricconductivity = 1e-9
      thermalexpansioncoefficient = 10e-6[1/K]
      density = 2300[kg/m^3]
      thermalconductivity = 1.8[W/(m*K)]
      heatcapacity = 880[J/(kg*K)]
      relpermittivity = 1
    Enu "Young's modulus and Poisson's ratio"
      E = 25[GPa]
      nu = 0.20

Physics
  g: GeneralFormPDE "PDE.Heart" on selection sel1
    dependent variable var1 = {Ve1, Vi1, u1}
    ShapeProperty.boundaryFlux = 0
    gfeq1: GeneralFormPDE (default)
      f = {iion1, -iion1, k*e*((Vm1-B)/A-d*u1-b)}
      Ga = 
        {-sigma_e*Ve1x, -sigma_e*Ve1y, -sigma_e*Ve1z}
        {-sigma_i*Vi1x, -sigma_i*Vi1y, -sigma_i*Vi1z}
        {0, 0, 0}
      da = {1, -1, 0, -1, 1, 0, 0, 0, 1}
    zflx1: ZeroFluxBoundary "Zero Flux 1" (default)
    init1: init "Initial Values 1" (default) | Ve1 = Ve0; Vi1 = Vi0; u1 = u0
    flux1: FluxBoundary "Flux/Source Torso" on selection int1 | g = {1*(ec.Jx*ec.nx + ec.Jy*ec.ny + ec.Jz*ec.nz), 0, 0}
  ec: ConductiveMedia "Electric Currents" on domains 1-5, 10, 14, 16-18, 23, 24
    dependent variable V
    ShapeProperty.frame = material
    PortSweepSettings.PortParamName = PortName
    cucn1: CurrentConservation (default)
      sigma_mat = userdef
      sigma = sigma_b
      epsilonr_mat = userdef
      epsilonr = 1
      minput_electricfield_src = root.mod1.ec.Ex
      materialType = solid
    ein1: ElectricInsulation (default)
    init1: init "Initial Values 1" (default)
    cucn2: CurrentConservation on domains 1-3 | materialType = solid
    pot3: ElectricPotential "Electric Potential Heart" on selection int1 | V0 = Ve1
    gnd1: Ground "Electric Potential GND" on selection sel10
    gnd2: Ground on selection sel43

Mesh
  mesh1 "Mesh 1"
    size: MeshSizeDefault | hmax = 600; hmin = 108; hcurve = 0.6; hnarrow = 0.5; hgrad = 1.5
    ftet1: FreeTet "Free Tetrahedral 1a" on remaining entities | method = dellegacy52
      size1: Size on domains 4 | hauto = 3
      size2: Size on domains 5-25 | hauto = 3
    size1: Size on no domains | hauto = 2

Studies
  std1 "Study 1"
    param: Parametric "Parametric Sweep" | pname = heart_y; plistarr = 2500
    time: Transient "Time Dependent" | tlist = range(0, 0.001, 0.8)

Solver configurations
  sol1 "Solver 1" (study std1)
    v1: Variables "Dependent Variables 1"
    t1: Time "Time-Dependent Solver 1"
      tlist = range(0, 0.001, 0.8)
      atolglobalvaluemethod = manual
      atolglobal = 0.0010
      atolvaluemethod = {mod1_V, manual, mod1_Ve1, manual, mod1_Vi1, manual, mod1_u1, manual}
      tstepsbdf = strict
      initialstepbdf = 0.0010
      masssingular = yes
      bwinitstepfrac = 1.0
      fc1: FullyCoupled
      dDef: Direct | linsolver = pardiso; pardreorder = ndmt; rhob = 400
  sol5 "Parametric Solutions 2" (study std1)

Datasets
  dset1: Solution "Sigma = 0.05" | solution = none
  dset2: Solution "sigma = 0.1" | solution = none
  dset3: Solution | solution = sol1
  dset5: Solution | solution = sol5
  cpl1: CutPlane "Left Plane" | data = dset5; quickx = 1250
  cpl2: CutPlane "Right Plane"
    data = dset5
    quickx = 3750
    spacevars = {cpl1x, cpl1y}
    normal = {cpl1nx, cpl1ny, cpl1nz}
  cln1: CutLine2D "Left Cut Line (2.5m)" | data = cpl1; genpoints = {{2500, 0}, {2500, 1500}}

Derived values
  int1: IntVolume "Volume Integration SAN" | data = dset1; table = tbl1; expr = 1; unit = m^3
  int2: IntVolume "Volume Integration Atria" | data = dset1; table = tbl2; expr = 1; unit = m^3
  int3: IntVolume "Volume Integration AVN" | data = dset1; table = tbl3; expr = 1; unit = m^3
  int4: IntVolume "Volume Integration Septum" | data = dset1; table = tbl4; expr = 1; unit = m^3
  int5: IntVolume "Volume Integration Ventricles" | data = dset1; table = tbl5; expr = 1; unit = m^3
  int6: IntVolume "Volume Integration Lungs" | data = dset1; table = tbl6; expr = 1; unit = m^3
  int7: IntVolume "Volume Integration Torso" | data = dset1; table = tbl7; expr = 1; unit = m^3
  int8: IntVolume "Volume Integration Blood" | data = dset1; expr = 1; unit = m^3

Plots
  pg13: PlotGroup1D "12 Leads" | data = dset5
    ptgr4: PointGraph "Lead I" on selection sel10 | expr = VI
    ptgr8: PointGraph "Lead II" on selection sel10 | expr = VII
    ptgr5: PointGraph "Lead III" on selection sel10 | expr = VIII
    ptgr9: PointGraph "aVR" on selection sel10 | expr = aVR
    ptgr10: PointGraph "aVL" on selection sel10 | expr = aVL
    ptgr11: PointGraph "aVF" on selection sel10 | expr = aVF
    ptgr12: PointGraph "V1" on selection sel10 | expr = V1
    ptgr13: PointGraph "V2" on selection sel10 | expr = V2
    ptgr14: PointGraph "V3" on selection sel10 | expr = V3
    ptgr15: PointGraph "V4" on selection sel10 | expr = V4
    ptgr16: PointGraph "V5" on selection sel10 | expr = V5
    ptgr17: PointGraph "V6" on selection sel10 | expr = V6
  pg9: PlotGroup1D "Left and Right Points" | data = dset5
    ptgr4: PointGraph "VP11" on selection sel10 | expr = VP11
  pg10: PlotGroup3D "PDE.Heart" | data = dset5
    slc1: Slice | expr = Ve1; descr = Dependent variable Ve1
  pg11: PlotGroup3D "Electric Potential (ec)" | data = dset5
    vol1: Volume | expr = V
  pg12: PlotGroup3D "Electric Field Norm (ec)" | data = dset5
    mslc1: Multislice
      expr = ec.normE
      multiplanexmethod = coord
      xcoord = ec.CPx
      multiplaneymethod = coord
      ycoord = ec.CPy
      multiplanezmethod = coord
      zcoord = ec.CPz
    strmsl1: StreamlineMultislice
      expr = {ec.Ex, ec.Ey, ec.Ez}
      descr = Electric field
      multiplanexmethod = coord
      xcoord = ec.CPx
      multiplaneymethod = coord
      ycoord = ec.CPy
      multiplanezmethod = coord
      zcoord = ec.CPz
      udist = 0.02
      col1: Color "Color Expression 1" | expr = ec.normE
      filt1: Filter | expr = !isScalingSystemDomain

Exports
  img1: Image "1D Image 1"
    size = manualprint
    unit = mm
    width = 100
    height = 76
    sizedesc = 1181 x 898 px
    pngfilename = ECG.surface.V123.(Finer,time.step=1ms)
    addsuffix = off
  plot3: Plot "12 Leads"
    filename = /Users/liujiting/Documents/UnderwaterEXG/simulation/heart_in_waterbox/export/ground_discussions/concrete/V6.txt
  plot2: Plot "Left and Right Points"
    filename = /Users/liujiting/Documents/SwimHR_MobiCom26_Artifact/simulation/pool_concrete_boundary.txt